// COMSOL Multiphysics 5.6.0.280 model "Simulation_5.mph"
// Outline of the model tree

Parameters
  lam = .58[um]  // in um
  p = 4[um]
  r1 = .25*p
  b1 = 0.69616300
  b2 = 0.407942600
  b3 = 0.897479400
  c1 = 0.00467914826[um^2]
  c2 = 0.0135120631[um^2]
  c3 = 97.9340025[um^2]
  n_silica = sqrt(1+((b1*lam^2)/(lam^2-c1))+((b2*lam^2)/(lam^2-c2))+((b3*lam^2)/(lam^2-c3)))
  na = 1.44
  r2 = .2166*p
  r0 = .7515*p
  H = 2.384*p
  na1 = 1.39
  na2 = 1.39
  ep = 5.9673
  c = 3E8[m/s]
  af = (2*pi*c)/lam
  pf = 2*pi*2113.6[THz]
  df = 15.92 [THz]*2*pi
  wf = 1.09
  sw = 104.86 [THz]*2*pi
  lo = 650.07[THz]*2*pi

Variables
  var1 "Variables 1a"
    area = intop1(abs(Ez)^2)^2/intop1(abs(Ez)^4)
    k_Au = imag(sqrt(ep-((pf*pf)/(af*(af+(i*df))))-((wf*lo*lo)/(((af*af)-(lo*lo))+(i*sw*af)))))
    n_Au = real(sqrt(ep-((pf*pf)/(af*(af+(i*df))))-((wf*lo*lo)/(((af*af)-(lo*lo))+(i*sw*af)))))
    n_TiO2 = sqrt(5.913+(0.2441)/(((lam/1[um])*(lam/1[um]))-(0.0803)))
    n_silica = sqrt(1+((b1*lam^2)/(lam^2-c1))+((b2*lam^2)/(lam^2-c2))+((b3*lam^2)/(lam^2-c3)))

Couplings
  intop1: Integration on domains 1, 3, 6, 8-10

Coordinate systems
  pml1: PML "Perfectly Matched Layer 1" on domains 1 | ScalingType = Cylindrical

Geometry
  geom1 "Geometry 1" (2D, length unit µm)
    c1: Circle | r = r1
    arr1: Array | input = c1; size = {5, 5}; fullsize = {5, 5}; displ = {p, p}
    mov1: Move | input = arr1; displx = -2*p; disply = -2*p
    c2: Circle | r = 2.6*p
    del1: Delete "Delete Entities 1" | input = mov1(1), mov1(21), mov1(25), mov1(5)
    sca1: Scale (disabled) | input = mov1(18); isotropic = r2/r1; factor = r2/r1; pos = {0, 2*p}
    c3: Circle (disabled) | pos = {0, H}; r = r0
    r1: Rectangle (disabled) | pos = {-3*p, H}; size = {6*p, 2*p}
    co1: Compose (disabled) | input = c2, c3, r1; formula = c2-c3-r1
    c4: Circle (disabled) | pos = {0, H}; r = r0+40[nm]
    r2: Rectangle (disabled) | pos = {-3*p, H}; size = {6*p, 2*p}
    co2: Compose (disabled) | input = c4, r2; formula = c4-r2
    del2: Delete "Delete Entities 2" (disabled) | input = co2(1) boundaries 1
    c5: Circle (disabled) | pos = {0, 7.87}; r = r0+40[nm]+6[nm]
    r3: Rectangle (disabled) | pos = {-3*p, 7.87}; size = {6*p, 2*p}
    co3: Compose (disabled) | input = c5, r3; formula = c5-r3
    del3: Delete "Delete Entities 3" (disabled) | input = co3(1) boundaries 1
    c6: Circle | r = 3.2*p
    c7: Circle | r = 3.7*p
    del4: Delete "Delete Entities 4" (disabled) | input = mov1(13), mov1(2), mov1(3), mov1(4)
    sca2: Scale (disabled) | input = mov1(8); isotropic = r2/r1; factor = r2/r1; pos = {0, -2*p}
    c8: Circle (disabled) | pos = {0, -H}; r = r0
    r4: Rectangle (disabled) | pos = {0, -H-p}; base = center; size = {6*p, 2*p}
    co4: Compose (disabled) | input = c8, co1, r4; formula = co1-c8-r4
    c9: Circle (disabled) | pos = {0, -H}; r = r0+40[nm]
    r5: Rectangle (disabled) | pos = {0, -H-p}; base = center; size = {6*p, 2*p}
    co5: Compose (disabled) | input = c9, r5; formula = c9-r5
    del5: Delete "Delete Entities 5" (disabled) | input = co5(1) boundaries 1
    pol1: Polygon | source = table; table = {{2.58*p, .3*p}, {3.19*p, .3*p}}
    pol2: Polygon | source = table; table = {{2.58*p, -.3*p}, {3.19*p, -.3*p}}
    pol3: Polygon | source = table; table = {{-2.58*p, .3*p}, {-3.19*p, .3*p}}
    pol4: Polygon | source = table; table = {{-2.58*p, -.3*p}, {-3.19*p, -.3*p}}
    del6: Delete "Delete Entities 6" | input = mov1(13), mov1(17), mov1(19), mov1(7), mov1(9)
    c10: Circle | r = 2.6*p+45[nm]
    c11: Circle (disabled) | r = p*.1
    c12: Circle (disabled) | pos = {p, p}; r = .05*p
    c13: Circle (disabled) | pos = {-p, p}; r = .05*p
    c14: Circle (disabled) | pos = {-p, -p}; r = .05*p
    c15: Circle (disabled) | pos = {p, -p}; r = .05*p
    c16: Circle (disabled) | r = 2.6*p+30[nm]+5[nm]
    c17: Circle | r = .3*r1
    c18: Circle (disabled) | pos = {p, p}; r = .3*r1
    c19: Circle (disabled) | pos = {-p, p}; r = .3*r1
    c20: Circle (disabled) | pos = {-p, -p}; r = .3*r1
    c21: Circle (disabled) | pos = {p, -p}; r = .3*r1
    fin: Finalize "Form Union"

Materials
  mat1: Common "air" on domains 11-27
    def "Basic"
      electricconductivity = 0
      relpermittivity = 1
      relpermeability = 1
    RefractiveIndex
      n = 1
      ki = 0
  mat3: Common "Analyte-1" on domains 4, 7
    def "Basic"
      electricconductivity = 0
      relpermittivity = 1
      relpermeability = 1
    RefractiveIndex
      n = na1
      ki = 0
  mat4: Common "silica" on domains 1, 3, 6, 8-10
    def "Basic"
      electricconductivity = 0
      relpermittivity = 1
      relpermeability = 1
    RefractiveIndex
      n = n_silica
      ki = 0
  mat5: Common "Au" on domains 5, 7
    RefractiveIndex
      n = re
      ki = im
  mat6: Common "TiO2" (disabled) on domains 5, 7
    RefractiveIndex
      n = n_TiO2
      ki = 0
  mat7: Common "Analyte-2" on domains 2
    RefractiveIndex
      n = na2
      ki = 0

Physics
  emw: ElectromagneticWaves on all domains
    dependent variable E = {Ex, Ey, Ez}
    wee1: WaveEquationElectric (default) | DisplacementFieldModel = RefractiveIndex
    pec1: PerfectElectricConductor (default)
    init1: init "Initial Values 1" (default)

Mesh
  mesh1 "Mesh 1" (physics-controlled)
    size: MeshSizeDefault | hauto = 3

Studies
  std1 "Study 1"
    param: Parametric "Parametric Sweep"
      sweeptype = filled
      pname = lam
      plistarr = range(.72e-6,2e-8,.94e-6)
      punit = m
    mode: ModeAnalysis | modeFreq = c_const/lam; neigs = 10; shift = n_silica

Solver configurations
  sol1 "Solution 1" (study std1)
    v1: Variables "Dependent Variables 1"
    e1: Eigenvalue "Eigenvalue Solver 1" | neigs = 10; shift = n_silica
      d1: Direct "Suggested Direct Solver (emw)" | linsolver = pardiso
  sol2 "Parametric Solutions 1" (study std1)

Datasets
  dset1: Solution | solution = sol1
  dset2: Solution | solution = sol2

Derived values
  gev1: EvalGlobal "Global Evaluation 1" | data = dset2; table = tbl1; expr = imag(emw.neff)

Tables
  tbl1: Table
    // Global Evaluation 1
    lam (m) | lambda | imag(emw.neff) (1)
    7.2e-07 | 1.4531-8.0429e-06i | -8.0429e-06
    7.4e-07 | 1.45259-2.08305e-05i | -2.08305e-05
    7.6e-07 | 1.45212-2.49008e-05i | -2.49008e-05
    7.8e-07 | 1.45166-1.2475e-05i | -1.2475e-05
    8e-07 | 1.4512-7.04994e-06i | -7.04994e-06
    8.2e-07 | 1.45076-4.75492e-06i | -4.75492e-06
    8.4e-07 | 1.45033-3.62669e-06i | -3.62669e-06
    8.6e-07 | 1.44991-3.00681e-06i | -3.00681e-06
    8.8e-07 | 1.4495-2.64402e-06i | -2.64402e-06
    9e-07 | 1.4491-2.4279e-06i | -2.4279e-06
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
Plots
  pg1: PlotGroup2D "Electric Field (emw)" | data = dset2
    surf1: Surface | data = dset2; expr = emw.normE